*Heading
** Job name: Job-2 Model name: Model-1
** Generated by: Abaqus/CAE 6.13-1
*Preprint, echo=NO, model=NO, history=NO, contact=NO
**
** PARTS
**
*Part, name=Part-1
*Node
      1,  -24.7542782,  -3.49653101
      2,  -24.1556225,  -6.44250393
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*Element, type=CPE4R
   1,  753,  494,  495,  733
   2,  665,   72,  611,  698
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*Nset, nset=Set-1, generate
    1,  2720,     1
*Elset, elset=Set-1, generate
    1,  2614,     1
** Section: Section-1
*Solid Section, elset=Set-1, material="Mild Steel"
,
*End Part
**
**
** ASSEMBLY
**
*Assembly, name=Assembly
**
*Instance, name=Part-1-1, part=Part-1
*End Instance
**
*Nset, nset=OuterBoundary, instance=Part-1-1
   1,   2,   3,   4,   5,   6
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*End Assembly
**
** MATERIALS
**
*Material, name="Mild Steel"
*Elastic
210000., 0.3
** ----------------------------------------------------------------
**
** STEP: Step-1
**
*Step, name=Step-1, nlgeom=NO
*Static
1., 1., 1e-05, 1.
*Include, Input=node_sets.inp
*Include, Input=node_bc.inp
**
** OUTPUT REQUESTS
**
*Restart, write, frequency=0
**
** FIELD OUTPUT: F-Output-1
**
*Output, field, variable=PRESELECT
**
** HISTORY OUTPUT: H-Output-1
**
*Output, history, variable=PRESELECT
*End Step
